*Heading
** Job name: BoundaryCond Model name: case2_obj1_max25_base
** Generated by: Abaqus/CAE 2020
*Preprint, echo=NO, model=NO, history=NO, contact=NO
**
** PARTS
**
**
*Part, name=POLE
*Node
      1,   34.7297249,  0.154442459,          40.
      2,   33.1424332,  -2.39596295,          40.
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*Element, type=S4R
  1,   1,   2,  17,  16
  2,   2,   3,  18,  17
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*Node
    211, -7.34788037e-15,         -20.,          20.
*Nset, nset=POLE-RefPt_, internal
211,
*Nset, nset=_PickedSet6, internal, generate
   1,  210,    1
*Elset, elset=_PickedSet6, internal, generate
   1,  182,    1
** Section: Section-1
*Shell Section, elset=_PickedSet6, material=MAT, offset=SNEG
1., 5
*End Part
**
**
** ASSEMBLY
**
*Assembly, name=Assembly
**
*End Instance
**
*Instance, name=POLE-1, part=POLE
          0.,          40.,    79.999999
          0.,          40.,    79.999999, 1.00000001268805,          40.,    79.999999, 89.9999992730282
*End Instance
**
*Nset, nset=BOT, instance=PART-1-1
     1,     2,     3,     4,     5,     6
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*Nset, nset=LEFT, instance=PART-1-1, generate
     1,  49996,    101
*Nset, nset=RIGHT, instance=PART-1-1, generate
   101,  50096,    101
*Nset, nset=_PickedSet19, internal, instance=POLE-1
 211,
*Nset, nset=_PickedSet20, internal, instance=POLE-1, generate
   1,  210,    1
*Elset, elset=_PickedSet20, internal, instance=POLE-1, generate
   1,  182,    1
*Nset, nset=_PickedSet21, internal, instance=POLE-1
 211,
** Constraint: RigidBody-1
*Rigid Body, ref node=_PickedSet19, elset=_PickedSet20
*End Assembly
**
** MATERIALS
**
*Material, name=MAT
*Density
 2.7e-09,
*Elastic
70000., 0.33
*Plastic
  180.,   0.
  190., 0.01
  197., 0.02
 211.5, 0.05
 225.8,  0.1
 233.6, 0.15
 238.5,  0.2
 248.5,  0.4
*Material, name=MAT_TI64
*Damage Initiation, criterion=JOHNSON COOK
 -0.09,  0.27,  0.48, 0.014,  3.87, 1878.,  293.,    1.
*Damage Evolution, type=ENERGY
 51.24,
*Density
 4.428e-09,
*Elastic
109778., 0.31
*Plastic, hardening=JOHNSON COOK
1098.,1092., 0.93,  1.1,1878., 293.
*Rate Dependent, type=JOHNSON COOK
 0.014,1.
**
** INTERACTION PROPERTIES
**
*Surface Interaction, name=INTPROP-1
*Friction
 0.5,
*Surface Behavior, pressure-overclosure=HARD
**
** BOUNDARY CONDITIONS
**
** Name: Disp-BC-1 Type: Symmetry/Antisymmetry/Encastre
*Boundary
BOT, YSYMM
** Name: Disp-BC-2 Type: Symmetry/Antisymmetry/Encastre
*Boundary
LEFT, XSYMM
** Name: Disp-BC-3 Type: Symmetry/Antisymmetry/Encastre
*Boundary
RIGHT, ENCASTRE
**
** INTERACTIONS
**
** Interaction: general_contact
*Contact, op=NEW
*Contact Inclusions, ALL EXTERIOR
*Contact Property Assignment
 ,  , INTPROP-1
** ----------------------------------------------------------------
**
** STEP: Step-1
**
*Step, name=Step-1, nlgeom=YES
*Dynamic, Explicit
, 0.0005
*Bulk Viscosity
0.06, 1.2
** Mass Scaling: Semi-Automatic
**               Whole Model
*Fixed Mass Scaling, dt=5e-08, type=below min
**
** BOUNDARY CONDITIONS
**
** Name: BC-4 Type: Velocity/Angular velocity
*Boundary, type=VELOCITY
_PickedSet21, 1, 1
_PickedSet21, 2, 2
_PickedSet21, 3, 3, -60000.
_PickedSet21, 4, 4
_PickedSet21, 5, 5
_PickedSet21, 6, 6
**
** OUTPUT REQUESTS
**
*Restart, write, number interval=1, time marks=NO
**
** FIELD OUTPUT: F-Output-1
**
*Output, field
*Element Output, directions=YES
DMICRT, ELEN, PEEQ, S, SDEG, STATUS, STH
**
** FIELD OUTPUT: F-Output-2
**
*Node Output
U,
**
** HISTORY OUTPUT: H-Output-1
**
*Output, history, variable=PRESELECT
*End Step
