*Heading
** Job name: BoundaryCond Model name: BoundaryConditions
** Generated by: Abaqus/CAE 2020
*Preprint, echo=NO, model=NO, history=NO, contact=NO
**
** PARTS
**
*Part, name=Plate
*Node
      1,   6.07000017,   6.07000017,           0.
      2,   98.9300003,   6.07000017,           0.
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*Element, type=S4R
   1,    1,    9,  397,  188
   2,    9,   10,  398,  397
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*Element, type=S3
2117, 2580, 2445, 2556
2118, 2606, 2479, 2565
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*Nset, nset=_PickedSet20, internal, generate
    1,  2871,     1
*Elset, elset=_PickedSet20, internal, generate
    1,  2770,     1
*Elset, elset=_NEG_SNEG, internal, generate
    1,  2770,     1
*Surface, type=ELEMENT, name=NEG
_NEG_SNEG, SNEG
*Elset, elset=_POS_SPOS, internal, generate
    1,  2770,     1
*Surface, type=ELEMENT, name=POS
_POS_SPOS, SPOS
** Section: FaceSheet
*Shell Section, elset=_PickedSet20, material=MAT
2.5, 5
*End Part
**
**
** ASSEMBLY
**
*Assembly, name=Assembly
**
*Instance, name=Plate-1, part=Plate
        -2.5,         -2.5,         9.75
*End Instance
**
*Instance, name=Plate-2, part=Plate
        -2.5,         -2.5,        -1.25
*End Instance
**
*Node
      1,          65.,          65.,          30.
*Nset, nset=_PickedSet23, internal
 1,
*Nset, nset=_PickedSet35, internal, instance=Plate-1
    1,    2,    3,    4,    5,    6
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*Nset, nset=_PickedSet35, internal, instance=Plate-2
    1,    2,    3,    4,    5,    6
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*Elset, elset=_PickedSet35, internal, instance=Plate-1, generate
 2117,  2770,     1
*Elset, elset=_PickedSet35, internal, instance=Plate-2, generate
 2117,  2770,     1
*Nset, nset=_PickedSet36, internal, instance=Plate-2
    1,    2,    3,    4,    9,   10
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*Elset, elset=_PickedSet36, internal, instance=Plate-2, generate
    1,  2116,     1
*Elset, elset=__PickedSurf34_SPOS, internal, instance=Plate-1, generate
    1,  2116,     1
*Surface, type=ELEMENT, name=_PickedSurf34, internal
__PickedSurf34_SPOS, SPOS
*End Assembly
**
** MATERIALS
**
*Material, name=MAT
*Damage Initiation, criterion=JOHNSON COOK
 -0.09,  0.27,  0.48, 0.014,  3.87, 1878.,  293.,    1.
*Damage Evolution, type=ENERGY
 51.24,
*Density
 4.428e-09,
*Elastic
109778., 0.31
*Plastic, hardening=JOHNSON COOK
1098.,1092., 0.93,  1.1,1878., 293.
*Rate Dependent, type=JOHNSON COOK
 0.014,1.
*Material, name=MAT-plastic
*Density
 4.428e-09,
*Elastic
109778., 0.31
*Plastic, hardening=JOHNSON COOK
1098.,1092., 0.93,  1.1,1878., 293.
*Rate Dependent, type=JOHNSON COOK
 0.014,1.
*Material, name=TI64_PLASTIC
*Density
 4.428e-09,
*Elastic
109778., 0.31
*Plastic, hardening=JOHNSON COOK
1098.,1092., 0.93,  1.1,1878., 293.
*Rate Dependent, type=JOHNSON COOK
 0.014,1.
**
** INTERACTION PROPERTIES
**
*Surface Interaction, name=INTPROP-1
*Friction
 0.5,
*Surface Behavior, pressure-overclosure=HARD
*Incident Wave Interaction Property, name=Blast, type=SURFACE BLAST
*CONWEP Charge Property
8e-06, 1000.
0.001, 1., 1e+06
**
** BOUNDARY CONDITIONS
**
** Name: BC-1 Type: Symmetry/Antisymmetry/Encastre
*Boundary
_PickedSet35, ENCASTRE
**
** INTERACTIONS
**
** Interaction: Int-1
*Contact, op=NEW
*Contact Inclusions, ALL EXTERIOR
*Contact Property Assignment
 ,  , INTPROP-1
** ----------------------------------------------------------------
**
** STEP: Step-1
**
*Step, name=Step-1, nlgeom=YES
*Dynamic, Explicit
, 0.0001
*Bulk Viscosity
0.06, 1.2
** Mass Scaling: Semi-Automatic
**               Whole Model
*Fixed Mass Scaling, dt=1e-08, type=below min
**
** INTERACTIONS
**
** Interaction: Blast
*Incident Wave Interaction, CONWEP, property=Blast
_PickedSurf34, _PickedSet23,   , 0., 5.
**
** OUTPUT REQUESTS
**
*Restart, write, number interval=1, time marks=NO
**
** FIELD OUTPUT: F-Output-1
**
*Output, field
*Node Output
U,
*Element Output, directions=YES
DMICRT, ELEN, PEEQ, S, SDEG, STATUS, STH
**
** HISTORY OUTPUT: H-Output-1
**
*Output, history, variable=PRESELECT
*End Step
